#if BM_LEG_RIGHT == ON
 #if BM_LEG_MUSCLES_RIGHT != OFF
  HumanModel.BodyModel.Right.Leg =
  {
    Seg =
    {
      #include "Custom_Mus_Leg_Nodes.any"
    };
    MusPar =
    {
      #if BM_LEG_MUSCLES_RIGHT == _MUSCLES_3E_HILL_
        #define MuscleModelType "AnyMuscleModel3E"
        #define MMType AnyMuscleModel3E
      #else
        #define MuscleModelType "AnyMuscleModel"
        #define MMType AnyMuscleModel
      #endif
      #include "Custom_Mus_Leg_MusPar.any"
      #undef MuscleModelType
      #undef MMType
    };
    Mus =
    {
      #include "Custom_Mus_Leg.any"
      #include "Custom_Mus_Leg_Addition.any"
      #include "Excluder_Mus_Leg.any"
    };
  };
 #endif
#endif

#if BM_LEG_LEFT == ON
 #if BM_LEG_MUSCLES_LEFT != OFF
  HumanModel.BodyModel.Left.Leg =
  {
    Seg =
    {
      #include "Custom_Mus_Leg_Nodes.any"
    };
    MusPar =
    {
      #if BM_LEG_MUSCLES_LEFT == _MUSCLES_3E_HILL_
        #define MuscleModelType "AnyMuscleModel3E"
        #define MMType AnyMuscleModel3E
      #else
        #define MuscleModelType "AnyMuscleModel"
        #define MMType AnyMuscleModel
      #endif
      #include "Custom_Mus_Leg_MusPar.any"
      #undef MuscleModelType
      #undef MMType
    };
    Mus =
    {
      #include "Custom_Mus_Leg.any"
      #include "Custom_Mus_Leg_Addition.any"
      #include "Excluder_Mus_Leg.any"
    };
  };
 #endif
#endif

//REF_HUMAN_BODYMODEL.Right.Leg.Mus.GastrocnemiusLateralis1.srf =
//{
//  AnyDrawParamSurf Drw =
//  {
//    RGB = {1, 1, 1};
//    Opacity = 0.5;
//  };
//};

//REF_HUMAN_BODYMODEL.Right.Leg.Seg.Thigh =
//{
//  IliacusWrapSurf =
//  {
//   cyl =
//   {
//     AnyDrawParamSurf Drw =
//     {
//       RGB = {1, 1, 1};
//       Opacity = 0.5;
//     };
//   };
//  };
//
//  AnyDrawPointCloud Drw_Points_IliacusWrapSurf =
//  {
//    Points = .IliacusWrapSurf.p;
//    RGB = {0, 0, 0};
//    Opacity = 1;
//    PointStyle.Size = 0.01;
//    Points3D = On;
//    ShowNames = Off;
//  };
//};
//REF_HUMAN_BODYMODEL.Trunk.SegmentsLumbar.PelvisSeg.Right.Muscles.GlueteusMaximusWrapSurfaces.Superior1.cyl =
//{
//  AnyDrawParamSurf Drw =
//  {
//    RGB = {1, 1, 1};
//    Opacity = 0.5;
//  };
//};
//REF_HUMAN_BODYMODEL.Trunk.SegmentsLumbar.PelvisSeg.Right.Muscles.GlueteusMaximusWrapSurfaces.Superior2.cyl =
//{
//  AnyDrawParamSurf Drw =
//  {
//    RGB = {1, 1, 1};
//    Opacity = 0.5;
//  };
//};
//REF_HUMAN_BODYMODEL.Trunk.SegmentsLumbar.PelvisSeg.Right.Muscles.GlueteusMaximusWrapSurfaces.Superior3.cyl =
//{
//  AnyDrawParamSurf Drw =
//  {
//    RGB = {1, 1, 1};
//    Opacity = 0.5;
//  };
//};
