#ifdef _override_scaling_for_Pelvis
HumanModel.BodyModel.Trunk.SegmentsLumbar.PelvisSeg =
{
  #include "Custom_Seg_Pelvis.any"
};
#endif //Right Thigh


#if BM_LEG_RIGHT == ON
 #ifdef _override_scaling_for_Right_Thigh
  HumanModel.BodyModel.Right.Leg =
  {
    Seg.Thigh =
    {
      #define SEG_SIGN 1
      #include "Custom_Seg_Thigh.any"
      #undef SEG_SIGN
    };
  };
 #endif //Right Thigh

 #ifdef _override_scaling_for_Right_Shank
  HumanModel.BodyModel.Right.Leg =
  {
    Seg.Shank =
    {
      #define SEG_SIGN 1
      #include "Custom_Seg_Shank.any"
      #undef SEG_SIGN
    };
  };
 #endif //Right Shank

 #ifdef _override_scaling_for_Right_Patella
  HumanModel.BodyModel.Right.Leg =
  {
    Seg.Patella =
    {
//      #define SEG_SIGN 1
//      #include "Custom_Seg_Patella.any"
//      #undef SEG_SIGN
//
//      DrwSurf.Visible = Off;
    };
  };
 #endif // Right Patella
//
// #ifdef _override_scaling_for_Right_Talus
// HumanModel.BodyModel.Right.Leg =
// {
//   Seg.Talus =
//   {
//     #define SEG_SIGN 1
//     #include "Custom_Seg_Talus.any"
//     #undef SEG_SIGN
//   };
// };
//#endif
#endif //Right LEG


#if BM_LEG_LEFT == ON
 #ifdef _override_scaling_for_Left_Thigh
  HumanModel.BodyModel.Left.Leg =
  {
    Seg.Thigh =
    {
      #define SEG_SIGN -1
      #include "Custom_Seg_Thigh.any"
      #undef SEG_SIGN
    };
  };
 #endif // Left Thigh
#endif


 #ifdef _override_scaling_for_Left_Shank
  HumanModel.BodyModel.Left.Leg =
  {
    Seg.Shank =
    {
      #define SEG_SIGN -1
      #include "Custom_Seg_Shank.any"
      #undef SEG_SIGN
    };
  };
 #endif // Left Shank

 #ifdef _override_scaling_for_Left_Patella
  HumanModel.BodyModel.Left.Leg =
  {
    Seg.Patella =
    {
//      #define SEG_SIGN -1
//      #include "Custom_Seg_Patella.any"
//      #undef SEG_SIGN
//
//      DrwSurf.Visible = Off;
    };
  };
 #endif //Left Patella
/*
 HumanModel.BodyModel.Left.Leg =
 {
   Seg.Talus =
   {
     #define SEG_SIGN -1
     #include "Custom_Seg_Talus.any"
     #undef SEG_SIGN
   };
 };
#endif

*/

HumanModel.BodyModel =
{
  #if BM_LEG_RIGHT == ON
  Right.Leg =
  {
    Jnt =
    {
      #if (BM_JOINT_TYPE_HIP_RIGHT == _JOINT_TYPE_USERDEFINED_)
      AnySphericalJoint Hip =
      {
        AnyRefNode &ThighNode = ..Seg.Thigh.HipJoint;
        AnyRefNode &PelvisNode = ..Seg.Pelvis.HipJoint;
      };//Hip
      #endif


      #if (BM_JOINT_TYPE_KNEE_RIGHT == _JOINT_TYPE_USERDEFINED_)
//       #if KNEE_JOINT_TYPE == __SPHERICAL__

        AnySphericalJoint Knee = {
          AnyRefNode &ThighNode = ..Seg.Thigh.KneeJoint;
          AnyRefNode &ShankNode = ..Seg.Shank.KneeJoint;
        };
        AnyKinRotational KneeRot = {
          AnyRefNode &ThighNode = ..Seg.Thigh.KneeJoint;
          AnyRefNode &ShankNode = ..Seg.Shank.KneeJoint;
          Type = PlanarAngles;
        };
        AnyKinEqSimpleDriver KneeRotations = {
          DriverPos = {0,0};
          DriverVel = {0,0};
          AnyKinMeasure &Measure = .KneeMoments.org;
          CType = {Soft, Soft};
          Reaction.Type = {Off, Off};
          WeightFun = {&wFun, &wFun};
          AnyFunConst wFun = {Value = {1e-3};};
        };
        AnyReacForce KneeMoments = {
          AnyKinMeasureOrg org = {
            AnyKinMeasure &KneeRot = ..KneeRot;
            MeasureOrganizer = {1,2};
          };
        };
//     #else
//
//       AnyRevoluteJoint Knee =
//       {
//         Axis = z;
//         AnyRefNode &ThighNode = ..Seg.Thigh.KneeJoint;
//         AnyRefNode &ShankNode = ..Seg.Shank.KneeJoint;
//         AnyDrawStdJoint Knee = {  };
//       };//Knee
//       #endif
      #endif

      #if (BM_JOINT_TYPE_PATELLOFEMORAL_RIGHT == _JOINT_TYPE_USERDEFINED_)
      AnyRevoluteJoint PatellaFemur =
      {
        Axis = z;
        AnyRefNode &ThighNode = ..Seg.Thigh.PatellaFemurJoint;
        AnyRefNode &PatellaNode = ..Seg.Patella.PatellaFemurJoint;
      };//Patellafemur
      #endif

      #if (BM_JOINT_TYPE_ANKLE_RIGHT == _JOINT_TYPE_USERDEFINED_)
      AnyRevoluteJoint Ankle =
      {
        Axis = z; //flexion extension
        AnyRefNode &ShankNode = ..Seg.Shank.AnkleJoint;
        AnyRefNode &FootNode  = ..Seg.Talus.AnkleJoint;
      };//Ankle
      #endif

//      #if (BM_JOINT_TYPE_PATELLATENDON_RIGHT == _JOINT_TYPE_USERDEFINED_)
//      AnyFolder KinematicMeasures =
//      {
//        AnyKinPLine Patella =
//        {
//          AnyRefNode &Origin_patella_tendon = ...Seg.Patella.Origin_patella_tendon;
//          AnyRefNode &Insertion_patella_tendon = ...Seg.Shank.Insertion_patella_tendon;
//
//          AnyDrawPLine Patella_tendon =
//          {
//            Thickness = 0.001;
//            RGB = {1,0,0};
//            Opacity = ....BonesOpacity.Patella;
//          };
//        };
//      };
//      AnyKinEqSimpleDriver PatellaMovement =
//      {
//        AnyKinPLine &Jnt = .KinematicMeasures.Patella;
//        AnyVar lengthScale = vnorm(..Seg.Shank.KneeJoint.sRel - ..Seg.Shank.Insertion_patella_tendon.sRel)
//        / vnorm(..Seg.Shank.StdPar.Insertion_patella_tendon-..Seg.Shank.StdPar.KneeJoint);
//        AnyVar TendonLength_Scaled =  lengthScale *..ModelParameters.PatellarLigamentLength;
//        AnyVar TendonLength_Custom = DEF_CUSTOM_SCALING_PATELLA_TENDON_LENGTH;
//
//        DriverPos = {TendonLength_Custom};
//        DriverVel = {0.0};
//        Reaction.Type = {On};  // The muscles must do the work
//      };
//      #endif
    };//Jnt
  };
  #endif

  #if BM_LEG_LEFT == ON
  Left.Leg =
  {
    Jnt =
    {
      #if (BM_JOINT_TYPE_HIP_LEFT == _JOINT_TYPE_USERDEFINED_)
      AnySphericalJoint Hip =
      {
        AnyRefNode &ThighNode = ..Seg.Thigh.HipJoint;
        AnyRefNode &PelvisNode = ..Seg.Pelvis.HipJoint;
      };//Hip
      #endif

      #if (BM_JOINT_TYPE_KNEE_LEFT == _JOINT_TYPE_USERDEFINED_)

       //#if KNEE_JOINT_TYPE == __SPHERICAL__

        AnySphericalJoint Knee = {
          AnyRefNode &ThighNode = ..Seg.Thigh.KneeJoint;
          AnyRefNode &ShankNode = ..Seg.Shank.KneeJoint;
        };
        AnyKinRotational KneeRot = {
          AnyRefNode &ThighNode = ..Seg.Thigh.KneeJoint;
          AnyRefNode &ShankNode = ..Seg.Shank.KneeJoint;
          Type = PlanarAngles;
        };
        AnyKinEqSimpleDriver KneeRotations = {
          DriverPos = {0,0};
          DriverVel = {0,0};
          AnyKinMeasure &Measure = .KneeMoments.org;
          CType = {Soft, Soft};
          Reaction.Type = {Off, Off};
          WeightFun = {&wFun, &wFun};
          AnyFunConst wFun = {Value = {1};};
        };
        AnyReacForce KneeMoments = {
          AnyKinMeasureOrg org = {
            AnyKinMeasure &KneeRot = ..KneeRot;
            MeasureOrganizer = {1,2};
          };
        };
//     #else
//
//       AnyRevoluteJoint Knee =
//       {
//         Axis = z;
//         AnyRefNode &ThighNode = ..Seg.Thigh.KneeJoint;
//         AnyRefNode &ShankNode = ..Seg.Shank.KneeJoint;
//         AnyDrawStdJoint Knee = {  };
//       };//Knee
//       #endif
      #endif

      #if (BM_JOINT_TYPE_PATELLOFEMORAL_LEFT == _JOINT_TYPE_USERDEFINED_)
      AnyRevoluteJoint PatellaFemur =
      {
        Axis = z;
        AnyRefNode &ThighNode = ..Seg.Thigh.PatellaFemurJoint;
        AnyRefNode &PatellaNode = ..Seg.Patella.PatellaFemurJoint;
      };//Patellafemur
      #endif

      #if (BM_JOINT_TYPE_ANKLE_LEFT == _JOINT_TYPE_USERDEFINED_)
      AnyRevoluteJoint Ankle =
      {
        Axis = z; //flexion extension
        AnyRefNode &ShankNode = ..Seg.Shank.AnkleJoint;
        AnyRefNode &FootNode  = ..Seg.Talus.AnkleJoint;
      };//Ankle
      #endif

//      #if (BM_JOINT_TYPE_PATELLATENDON_LEFT == _JOINT_TYPE_USERDEFINED_)
//      AnyFolder KinematicMeasures =
//      {
//        AnyKinPLine Patella =
//        {
//          AnyRefNode &Origin_patella_tendon = ...Seg.Patella.Origin_patella_tendon;
//          AnyRefNode &Insertion_patella_tendon = ...Seg.Shank.Insertion_patella_tendon;
//
//          AnyDrawPLine Patella_tendon =
//          {
//            Thickness = 0.001;
//            RGB = {1,0,0};
//            Opacity = ....BonesOpacity.Patella;
//          };
//        };
//      };
//      AnyKinEqSimpleDriver PatellaMovement =
//      {
//        AnyKinPLine &Jnt = .KinematicMeasures.Patella;
//        AnyVar lengthScale = vnorm(..Seg.Shank.KneeJoint.sRel - ..Seg.Shank.Insertion_patella_tendon.sRel)
//        / vnorm(..Seg.Shank.StdPar.Insertion_patella_tendon-..Seg.Shank.StdPar.KneeJoint);
//        AnyVar TendonLength_Scaled =  lengthScale *..ModelParameters.PatellarLigamentLength;
//        AnyVar TendonLength_Custom = DEF_CUSTOM_SCALING_PATELLA_TENDON_LENGTH;
//
//        DriverPos = {TendonLength_Custom};
//        DriverVel = {0.0};
//        Reaction.Type = {On};  // The muscles must do the work
//      };
//      #endif
    };//Jnt
  };
  #endif
};
